# T7 the removed rot_sllod option must stop the run with an explanation
units lj
atom_style ellipsoid
read_data data.two_spheres
pair_style gran/spherocyl/mfix/history 1000 0 0 0 0 1
pair_coeff * * 0.5 0.0
fix int all nve/spherocyl rot_sllod 1.8
